# Лабораторная работа №1
# Представление сигналов рядом фурье
# Цель работы: ИССЛЕДОВАНИЕ ЗАКОНОМЕРНОСТЕЙ ПРЕДСТАВЛЕНИЯ СИГНАЛОВ РЯДОМ ФУРЬЕ
# РАЗДЕЛ А АМПЛИТУДНЫЙ И ФАЗОВЫЙ СПЕКТРЫ ПЕРИОДИЧЕСКОЙ ПОСЛЕДОВАТЕЛЬНОСТИ ПРЯМОУГОЛЬНЫХ ИМПУЛЬСОВ
B := 1
τ := 6*5*10^-6
T := 60*10^-6
t := -T/2, -0.9999*T/2 .. T/2
f1 := 1/T
n := -5*T/τ, -5*T/τ + 1 .. 5*T/τ
f := -5/τ, -0.9999*5/τ .. 5/τ
U1(t) :=
    B if -τ/2 ≤ t ≤ τ/2
    0 if t < -τ/2 or t > τ/2
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C1(f) :=
    B*sin(π*f*τ)/(π*f*T) if f ≠ 0
    B*τ/T if f == 0
C(f) :=
    B*sin(π*f*τ)/(π*f*T) if f ≠ 0
    B*τ/T if f == 0
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D(f) := |C(f)|
D1(f) := |C1(f)|
Θ(f) := arg(C(f))
Θ1(f) := arg(C1(f))
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A(f) :=
    |C(f)| if f == 0
    2*|C(f)| if f > 0
    0 if f < 0
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# РАЗДЕЛ Б ПРЕДСТАВЛЕНИЕ СИГНАЛОВ РЯДОМ ФУРЬЕ ИНЖИНЕРНОЙ ТРИГОНОМЕТРИЧЕСКОЙ ФОРМЕ
U2(t) := sum(A(n*f1)*cos(2*π*n*f1*t + Θ(n*f1)), n = 0 .. 45)
t := 0, 0.0001*T .. 5*T
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U3(t, n) := A(n*f1)*cos(2*π*n*f1*t + Θ(n*f1))
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