φ
# Лабораторная работа №2(3)
# Представление прямоугольных ( треугольных ) импульсов рядом Котельникова
# Цель работы:Исслдеование закономерностей представления прямоугольных (треугольных) имупльсов рядом Котельникова
# Раздел А  Свойтва базисных функций
fm := 8*0.25*10^6
δ := 1/(2*fm)
ωm := 2*π*fm
n := -10, -9 .. 10
T := 20*10^-6
t := -T, -0.9999*T .. T
φ(t, n) :=
    (sin(ωm*(t - n*δ))/(ωm*(t - n*δ))) if t ≠ n*δ
    1 if t == n*δ
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# Раздел Б Представление прямоугольных импульсов
A := 1
t1 := 1*10^-6
t2 := 4*10^-6
τ := 5*10^-6
T := 20*10^-6
t := 0, 0.0001*T .. T
fm := 1*10^6
ωm := 2*π*fm
δ := 1/(2*fm)
f0(t) :=
    A if (t2 ≥ t ≥ t1)
    0 if (t < t1) or (t > t2)
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f(t) := f0(t) + f0(t - τ)
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N := 2*fm*T
n := 0, 1 .. N
C(n) := f(n*δ)
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φ(t, n) :=
    (sin(ωm*(t - n*δ))/(ωm*(t - n*δ))) if t ≠ n*δ
    1 if t == n*δ
f1(t) := sum(f(n*δ)*φ(t, n), n = 0 .. N)
f2(t, n) := f(n*δ)*φ(t, n)
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