# ЛАБОРАТОРНАЯ РАБОТА №4
# ПРЕДСТАВЛЕНИЕ СИГНАЛОВ ПРЕОБРАЗОВАНИЕМ ФУРЬЕ
#
# Цель работа: ИССЛЕДОВАНИЕ СПЕКТРАЛЬНЫХ ХАРАКТЕРИСТИК ВИДЕОИМПУЛЬСОВ
#
# РАЗДЕЛ А  СПЕКТРАЛЬНАЯ ПЛОТНОСТЬ ОДИНОЧНОГО ПРЯМОГУГОЛЬНОГО ИМПУЛЬСА
K := 5
A := 2
τ := 2*10^-6
F := K/τ
f := -F, -0.99999*F .. F
U1(t) :=
    A if -τ/2 ≤ t ≤ τ/2
    0 if t < -τ/2 or t > τ/2
T1 := 5*τ
t := -T1, -0.99999*T1 .. T1
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D1(f) := 0
j := sqrt(-1)
C1(f) :=
    2*A*sin(2*π*f*τ/2)/(2*π*f) if f ≠ 0
    (A*τ) if f == 0
S1(f) := C1(f) + j*D1(f)
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E1(f) := |S1(f)|
θ1(f) := arg(S1(f))
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# СМЕЩЕНИЕ ПО ВРЕМЕНИ
t1 := -2*10^-6
U11(t) := U1(t - t1)
S11(f) := S1(f)*e^(-j*2*π*f*t1)
E11(f) := |S11(f)|
θ11(f) := arg(S11(f))
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# РАЗДЕЛ Б  СПЕКТРАЛЬНАЯ ПЛОТНОСТЬ ПАЧКИ ПРЯМОУГОЛЬНЫХ ИМПУЛЬСОВ
A := 2
τ := 2*10^-6
f := -F, -0.99999*F .. F
K := 5
T := 5*τ
N := 100
T1 := (N + 1)*T
t := -T1, -0.99999*T1 .. T1
F := K/τ
U1(t) :=
    A if -τ/2 ≤ t ≤ τ/2
    0 if t < -τ/2 or t > τ/2
U12(t) := sum(U1(t - n*T), n = -N .. N)
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D1(f) := 0
j := sqrt(-1)
C1(f) :=
    2*A*sin(2*π*f*τ/2)/(2*π*f) if f ≠ 0
    (A*τ) if f == 0
S1(f) := C1(f) + j*D1(f)
S12(f) := sum(S1(f)*e^(-j*2*π*f*n*T), n = -N .. N)
E12(f) := |S12(f)|
θ12(f) := arg(S12(f))
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