ORIGIN := 1
# Задаём численные значения элементов цепи
R1 := 240
R2 := 660
R3 := 970
R4 := 480
R5 := 190
R6 := 840
R7 := 930
R8 := 590
E1 := 0
E2 := 0
E3 := 400
E4 := 0
E5 := 600
E6 := 0
E7 := 0
E8 := 900
I01 := 0
I02 := 0
I03 := 2
I04 := 0
I05 := 0
I06 := 8
I07 := 7
I08 := 0
# 7. Определение токов в ветвях исходной схемы методом законов Кирхгофа
# Записываем уравнения, описывющие цепь, в матричном виде
# Ах = В, где: А - квадратная матрица; В - матрица столбец правых частей; х - матрица столбец искомых токов.
R[1] := R1
R[2] := R2
R[3] := R3
R[4] := R4
R[5] := R5
R[6] := R6
R[7] := R7
R[8] := R8
J[01] := I01
J[03] := I03
J[05] := I05
J[07] := I07
J[02] := I02
J[04] := I04
J[06] := I06
J[08] := I08
A1 := [
    -1, 0, 0, 0, 0, 1, 1, 0;
    1, -1, 0, 0, 0, 0, 0, -1;
    0, 1, -1, 0, 0, 0, -1, 0;
    0, 0, 1, -1, 0, 0, 0, 0;
    0, 0, 0, 1, -1, 0, 0, 1;
    R1, 0, 0, 0, R5, R6, 0, R8;
    0, R2, R3, R4, 0, 0, 0, -R8;
    R1, R2, 0, 0, 0, 0, R7, 0
]
B1 := [
    I01 - I06 - I07;
    -I01 + I02 + I08;
    -I02 + I03 + I07;
    -I03 + I04;
    -I04 + I05 - I08;
    E1 + E5 + E6 + E8;
    E2 + E3 + E4 - E8;
    E1 + E2 + E7
]
E[1] := E1
E[3] := E3
E[5] := E5
E[7] := E7
E[2] := E2
E[4] := E4
E[6] := E6
E[8] := E8
# Выводим численные значения матриц
A1 = [
    -1, 0, 0, 0, 0, 1, 1, 0;
    1, -1, 0, 0, 0, 0, 0, -1;
    0, 1, -1, 0, 0, 0, -1, 0;
    0, 0, 1, -1, 0, 0, 0, 0;
    0, 0, 0, 1, -1, 0, 0, 1;
    1, 0, 0, 0, 5, 6, 0, 8;
    0, 2, 3, 4, 0, 0, 0, -8;
    1, 2, 0, 0, 0, 0, 7, 0
]
B1 = [-12; 9; 8; 1; -7; 20; 1; 10]
# Находим неизвестные токи умножая обратную матрицу А на матрицу В.
x := A1^-1*B1
# Выводим численные значения токов в виде вектора строки путём транспонирования х.
transpose(x) = [11.8521, 4.31395, -2.1889, -3.1889, 2.3493, 1.3493, -1.49715, -1.4618]
# 8. Определение токов в ветвях исходной схемы методом контурных токов
# Выводим матрицы столбцы с целью проверки исходных данных
E = [1; 2; 3; 4; 5; 6; 7; 8]
R = [1; 2; 3; 4; 5; 6; 7; 8]
J = [1; 2; 3; 4; 5; 6; 7; 8]
# Формируем диагональную матрицу RD из матрицы R
RD := diag(R)
# Выводим диагональную матрицу RD с целью проверки
RD = [
    1, 0, 0, 0, 0, 0, 0, 0;
    0, 2, 0, 0, 0, 0, 0, 0;
    0, 0, 3, 0, 0, 0, 0, 0;
    0, 0, 0, 4, 0, 0, 0, 0;
    0, 0, 0, 0, 5, 0, 0, 0;
    0, 0, 0, 0, 0, 6, 0, 0;
    0, 0, 0, 0, 0, 0, 7, 0;
    0, 0, 0, 0, 0, 0, 0, 8
]
# Формируем узловую матрицу А и контурную В
A := [
    -1, 0, 0, 0, 0, 1, 1, 0;
    1, -1, 0, 0, 0, 0, 0, -1;
    0, 1, -1, 0, 0, 0, -1, 0;
    0, 0, 1, -1, 0, 0, 0, 0;
    0, 0, 0, 1, -1, 0, 0, 1
]
B := [1, 0, 0, 0, 1, 1, 0, 1; 0, 1, 1, 1, 0, 0, 0, -1; 1, 1, 0, 0, 0, 0, 1, 0]
# Находим контурные токи
Ik := (B*RD*transpose(B))^-1*(B*E + B*RD*J)
Ik = [7.3493; 0.811098; 5.50285]
# Определяем токи ветвей
I := transpose(B)*Ik
transpose(I) = [12.8521, 6.31395, 0.811098, 0.811098, 7.3493, 7.3493, 5.50285, 6.5382]
# Определяем токи в сопротивлениях ветвей
IR := I - J
transpose(IR) = [11.8521, 4.31395, -2.1889, -3.1889, 2.3493, 1.3493, -1.49715, -1.4618]
# 9. Определение токов в ветвях исходной схемы методом узловых напряжений
# Формируем узловую матрицу А и контурную В
A := [
    -1, 0, 0, 0, 0, 1, 1, 0;
    1, -1, 0, 0, 0, 0, 0, -1;
    0, 1, -1, 0, 0, 0, -1, 0;
    0, 0, 1, -1, 0, 0, 0, 0;
    0, 0, 0, 1, -1, 0, 0, 1
]
B := [1, 0, 0, 0, 1, 1, 0, 1; 0, 1, 1, 1, 0, 0, 0, -1; 1, 1, 0, 0, 0, 0, 1, 0]
# Формируем диагональную матрицу RD из матрицы R
RD := diag(R)
# Переформировываем матрицу RD в G
G := 1/RD
# Определяем потенциалы всех узлов по отношению к базисному узлу
F := (A*G*transpose(A))^-1*(-A*G*E - A*J)
F = [2.09578; 12.9479; 19.5758; 10.0091; -6.74648]
# Определяем напряжение на всех ветвях цепи
U := transpose(A)*F
transpose(U) = [10.8521, 6.6279, -9.5667, -16.7556, 6.74648, 2.09578, -17.48, -19.6944]
# Определяем токи в сопротивлениях ветвей
IR := G*(U + E)
transpose(IR) = [11.8521, 4.31395, -2.1889, -3.1889, 2.3493, 1.3493, -1.49715, -1.4618]
