ORIGIN := 1
i := sqrt(-1)
# Задаём численные значения элементов цепи
R1 := 11
R2 := 71
R3 := 0
R4 := 0
R5 := 0
R6 := 95
R7 := 0
R8 := 51
XL1 := 0
XL2 := 0
XL3 := 45
XL4 := 46
XL5 := 46
XL6 := 0
XL7 := 18
XL8 := 0
XC1 := 0
XC2 := 33
XC3 := 92
XC4 := 0
XC5 := 0
XC6 := 52
XC7 := 0
XC8 := 24
E1 := 0*e^(i*0*deg)
E3 := 0*e^(i*0*deg)
E5 := 0*e^(i*0*deg)
E7 := 0*e^(i*0*deg)
E2 := 0*e^(i*0*deg)
E4 := 0*e^(i*0*deg)
E6 := 53*e^(i*253*deg)
E8 := 0*e^(i*0*deg)
Z1 := R1 + i*XL1 - i*XC1 = 11
Z5 := R5 + i*XL5 - i*XC5 = 46i
Z2 := R2 + i*XL2 - i*XC2 = 71 - 33i
Z6 := R6 + i*XL6 - i*XC6 = 95 - 52i
Z3 := R3 + i*XL3 - i*XC3 = -47i
Z7 := R7 + i*XL7 - i*XC7 = 18i
Z4 := R4 + i*XL4 - i*XC4 = 46i
Z8 := R8 + i*XL8 - i*XC8 = 51 - 24i
# 7. Определение токов в ветвях исходной схемы методом законов Кирхгофа
# Записываем уравнения, описывющие цепь, в матричном виде
# Ах = В, где: А - квадратная матрица;
# В - матрица столбец правых частей;
# х - матрица столбец искомых токов.
R[1] := Z1 = 11
R[5] := Z5 = 46i
R[2] := Z2 = 71 - 33i
R[6] := Z6 = 95 - 52i
R[3] := Z3 = -47i
R[7] := Z7 = 18i
R[4] := Z4 = 46i
R[8] := Z8 = 51 - 24i
A1 := [
    -1, 0, 0, 0, 0, 1, 0, 1;
    1, -1, 0, 0, 0, 0, -1, 0;
    0, 1, -1, 0, 0, 0, 0, -1;
    0, 0, 1, -1, 0, 0, 0, 0;
    0, 0, 0, 1, -1, 0, 1, 0;
    Z1, 0, 0, 0, Z5, Z6, Z7, 0;
    0, Z2, Z3, Z4, 0, 0, -Z7, 0;
    Z1, Z2, 0, 0, 0, 0, 0, Z8
]
B1 := [0; 0; 0; 0; 0; E1 + E5 + E6 + E7; E2 + E3 + E4 - E7; E1 + E2 + E8]
E[1] := E1
E[5] := E5
E[2] := E2
E[6] := E6
E[3] := E3
E[7] := E7
# Выводим численные значения матриц
E[4] := E4
E[8] := E8
A1 = [
    -1, 0, 0, 0, 0, 1, 0, 1;
    1, -1, 0, 0, 0, 0, -1, 0;
    0, 1, -1, 0, 0, 0, 0, -1;
    0, 0, 1, -1, 0, 0, 0, 0;
    0, 0, 0, 1, -1, 0, 1, 0;
    11, 0, 0, 0, 46i, 95 - 52i, 18i, 0;
    0, 71 - 33i, -47i, 46i, 0, 0, -18i, 0;
    11, 71 - 33i, 0, 0, 0, 0, 0, 51 - 24i
]
B1 = [0; 0; 0; 0; 0; -15.4957 - 50.6842i; 0; 0]
# Находим неизвестные токи умножая обратную матрицу А на матрицу В.
x := A1^-1*B1
# Выводим численные значения токов в виде вектора строки путём транспонирования х.
transpose(x) = [-0.258933 - 0.305797i, 0.0893672 - 0.0440394i, 0.193482 - 0.180136i, 0.193482 - 0.180136i, -0.154818 - 0.441894i, -0.154818 - 0.441894i, -0.3483 - 0.261758i, -0.104114 + 0.136097i]
# 8. Определение токов в ветвях исходной схемы методом контурных токов
# Выводим матрицы столбцы с целью проверки исходных данных
E = [0; 0; 0; 0; 0; -15.4957 - 50.6842i; 0; 0]
R = [11; 71 - 33i; -47i; 46i; 46i; 95 - 52i; 18i; 51 - 24i]
# Формируем диагональную матрицу RD из матрицы R
RD := diag(R)
# Выводим диагональную матрицу RD с целью проверки
RD = [
    11, 0, 0, 0, 0, 0, 0, 0;
    0, 71 - 33i, 0, 0, 0, 0, 0, 0;
    0, 0, -47i, 0, 0, 0, 0, 0;
    0, 0, 0, 46i, 0, 0, 0, 0;
    0, 0, 0, 0, 46i, 0, 0, 0;
    0, 0, 0, 0, 0, 95 - 52i, 0, 0;
    0, 0, 0, 0, 0, 0, 18i, 0;
    0, 0, 0, 0, 0, 0, 0, 51 - 24i
]
# Формируем узловую матрицу А и контурную В
A := [
    -1, 0, 0, 0, 0, 1, 0, 1;
    1, -1, 0, 0, 0, 0, -1, 0;
    0, 1, -1, 0, 0, 0, 0, -1;
    0, 0, 1, -1, 0, 0, 0, 0;
    0, 0, 0, 1, -1, 0, 1, 0
]
B := [1, 0, 0, 0, 1, 1, 1, 0; 0, 1, 1, 1, 0, 0, -1, 0; 1, 1, 0, 0, 0, 0, 0, 1]
# Находим контурные токи
Ik := (B*RD*transpose(B))^-1*(B*E)
Ik = [-0.154818 - 0.441894i; 0.193482 - 0.180136i; -0.104114 + 0.136097i]
# Определяем токи ветвей
I := transpose(B)*Ik
transpose(I) = [-0.258933 - 0.305797i, 0.0893672 - 0.0440394i, 0.193482 - 0.180136i, 0.193482 - 0.180136i, -0.154818 - 0.441894i, -0.154818 - 0.441894i, -0.3483 - 0.261758i, -0.104114 + 0.136097i]
# Определяем токи в сопротивлениях ветвей
IR := I
transpose(IR) = [-0.258933 - 0.305797i, 0.0893672 - 0.0440394i, 0.193482 - 0.180136i, 0.193482 - 0.180136i, -0.154818 - 0.441894i, -0.154818 - 0.441894i, -0.3483 - 0.261758i, -0.104114 + 0.136097i]
# 9. Определение токов в ветвях исходной схемы методом узловых напряжений
# Формируем узловую матрицу А и контурную В
A := [
    -1, 0, 0, 0, 0, 1, 0, 1;
    1, -1, 0, 0, 0, 0, -1, 0;
    0, 1, -1, 0, 0, 0, 0, -1;
    0, 0, 1, -1, 0, 0, 0, 0;
    0, 0, 0, 1, -1, 0, 1, 0
]
B := [1, 0, 0, 0, 1, 1, 1, 0; 0, 1, 1, 1, 0, 0, -1, 0; 1, 1, 0, 0, 0, 0, 0, 1]
# Формируем диагональную матрицу RD из матрицы R
RD := diag(R)
# Переформировываем матрицу RD в G
G := 1/RD
# Определяем потенциалы всех узлов по отношению к базисному узлу
F := (A*G*transpose(A))^-1*(-A*G*E)
F = [-22.1905 + 16.7548i; -25.0387 + 13.391i; -20.147 + 7.31511i; -28.6134 - 1.77852i; -20.3271 + 7.12163i]
# Определяем напряжение на всех ветвях цепи
U := transpose(A)*F
# Определяем токи в сопротивлениях ветвей
IR := G*(U + E)
U = [-2.84826 - 3.36377i; 4.89177 - 6.07591i; -8.4664 - 9.09364i; 8.28626 + 8.90016i; 20.3271 - 7.12163i; -22.1905 + 16.7548i; 4.71164 - 6.26939i; -2.04351 + 9.43968i]
IR = [-0.258933 - 0.305797i; 0.0893672 - 0.0440394i; 0.193482 - 0.180136i; 0.193482 - 0.180136i; -0.154818 - 0.441894i; -0.154818 - 0.441894i; -0.3483 - 0.261758i; -0.104114 + 0.136097i]
